# OpenSim document version 30000
CMCTool task:
  model_file: ../residual_reduction_algorithm/model_adjusted.osim
  replace_force_set: false
  force_set_files: ../model/reserve_actuators.xml
  results_directory: .
  output_precision: 8
  initial_time: 0
  final_time: 2.5
  solve_for_equilibrium_for_auxiliary_states: true
  maximum_number_of_integrator_steps: 20000
  maximum_integrator_step_size: 1
  minimum_integrator_step_size: 1e-8
  integrator_error_tolerance: 1e-5
  external_loads_file: ../experimental_data/setup_grf_after_rra.xml
  desired_kinematics_file: ../residual_reduction_algorithm/task_Kinematics_q.sto
  task_set_file: ../model/tracking_tasks.xml
  lowpass_cutoff_frequency: -1
  cmc_time_window: 0.005
  use_fast_optimization_target: true
  optimizer_algorithm: ipopt
  numerical_derivative_step_size: 0.0001
  optimization_convergence_tolerance: 0.0001
  optimizer_max_iterations: 1000
  optimizer_print_level: 0
  use_verbose_printing: false
  AnalysisSet Analyses:
    MuscleAnalysis: start_time=-infinity end_time=infinity step_interval=1 muscle_list=all compute_moments=false
    Kinematics: start_time=-infinity end_time=infinity step_interval=1 in_degrees=true
