# OpenSim document version 40000
InverseKinematicsTool task:
  results_directory: .
  model_file: ../scale/model_scaled.osim
  constraint_weight: Inf
  accuracy: 1e-5
  marker_file: ../experimental_data/task.trc
  report_errors: true
  output_motion_file: ./task_InverseKinematics.mot
  report_marker_locations: true
  IKTaskSet:
    IKMarkerTask Sternum: apply=true weight=1
    IKMarkerTask R.Acromium: apply=true weight=0.5
    IKMarkerTask L.Acromium: apply=true weight=0.5
    IKMarkerTask Top.Head: apply=true weight=0.1
    IKMarkerTask R.ASIS: apply=true weight=10
    IKMarkerTask L.ASIS: apply=true weight=10
    IKMarkerTask V.Sacral: apply=true weight=10
    IKMarkerTask R.Thigh.Upper: apply=true weight=1
    IKMarkerTask R.Thigh.Front: apply=true weight=1
    IKMarkerTask R.Thigh.Rear: apply=true weight=1
    IKMarkerTask R.Shank.Upper: apply=true weight=1
    IKMarkerTask R.Shank.Front: apply=true weight=1
    IKMarkerTask R.Shank.Rear: apply=true weight=1
    IKMarkerTask R.Heel: apply=true weight=10
    IKMarkerTask R.Midfoot.Sup: apply=true weight=1
    IKMarkerTask R.Midfoot.Lat: apply=true weight=1
    IKMarkerTask R.Toe.Lat: apply=true weight=1
    IKMarkerTask R.Toe.Med: apply=true weight=1
    IKMarkerTask R.Toe.Tip: apply=true weight=10
    IKMarkerTask L.Thigh.Upper: apply=true weight=1
    IKMarkerTask L.Thigh.Front: apply=true weight=1
    IKMarkerTask L.Thigh.Rear: apply=true weight=1
    IKMarkerTask L.Shank.Upper: apply=true weight=1
    IKMarkerTask L.Shank.Front: apply=true weight=1
    IKMarkerTask L.Shank.Rear: apply=true weight=1
    IKMarkerTask L.Heel: apply=true weight=10
    IKMarkerTask L.Midfoot.Sup: apply=true weight=1
    IKMarkerTask L.Midfoot.Lat: apply=true weight=1
    IKMarkerTask L.Toe.Lat: apply=true weight=1
    IKMarkerTask L.Toe.Med: apply=true weight=1
    IKMarkerTask L.Toe.Tip: apply=true weight=10
