# OpenSim document version 30000
AnalyzeTool task:
  model_file: ../residual_reduction_algorithm/model_adjusted.osim
  replace_force_set: false
  force_set_files: ../model/reserve_actuators.xml
  results_directory: .
  output_precision: 8
  initial_time: -infinity
  final_time: infinity
  solve_for_equilibrium_for_auxiliary_states: false
  maximum_number_of_integrator_steps: 20000
  maximum_integrator_step_size: 1
  minimum_integrator_step_size: 1e-8
  integrator_error_tolerance: 1e-5
  external_loads_file: ../experimental_data/setup_grf_after_rra.xml
  coordinates_file: ../residual_reduction_algorithm/task_Kinematics_q.sto
  lowpass_cutoff_frequency_for_coordinates: -1
  AnalysisSet Analyses:
    JointReaction: start_time=-infinity end_time=infinity step_interval=1 in_degrees=true
        forces_file=../static_optimization/task_StaticOptimization_force.sto joint_names=ALL apply_on_bodies=child
        express_in_frame=ground
