# OpenSim document version 20302
MarkerSet gait2354_Scale:
  Marker R.ASIS: pelvis (0.02 0.03 0.128)
  Marker L.ASIS: pelvis (0.02 0.03 -0.128)
  Marker V.Sacral: pelvis (-0.16 0.04 0)
  Marker R.Thigh.Upper: femur_r (0.018 -0.2 0.064)
  Marker R.Thigh.Front: femur_r (0.08 -0.25 0.0047)
  Marker R.Thigh.Rear: femur_r (0.01 -0.3 0.06)
  Marker R.Knee.Lat: femur_r (0 -0.404 0.05)
  Marker R.Knee.Med: femur_r (0 -0.404 -0.05)
  Marker R.Shank.Upper: tibia_r (0.005 -0.065 0.05)
  Marker R.Shank.Front: tibia_r (0.05 -0.08 0)
  Marker R.Shank.Rear: tibia_r (0.02 -0.13 0.05)
  Marker R.Ankle.Lat: tibia_r (-0.005 -0.41 0.053)
  Marker R.Ankle.Med: tibia_r (0.006 -0.3888 -0.038)
  Marker R.Heel: calcn_r (-0.02 0.02 0)
  Marker R.Midfoot.Sup: calcn_r (0.13 0.03 -0.03)
  Marker R.Midfoot.Lat: calcn_r (0.1 0.02 0.04)
  Marker R.Toe.Lat: calcn_r (0.19 0 0.065)
  Marker R.Toe.Med: calcn_r (0.19 0.005 -0.04)
  Marker R.Toe.Tip: calcn_r (0.26 0.005 0)
  Marker L.Thigh.Upper: femur_l (0.018 -0.2 -0.064)
  Marker L.Thigh.Front: femur_l (0.08 -0.25 -0.0047)
  Marker L.Thigh.Rear: femur_l (0.01 -0.3 -0.06)
  Marker L.Knee.Lat: femur_l (0 -0.404 -0.05)
  Marker L.Knee.Med: femur_l (0 -0.404 0.05)
  Marker L.Shank.Upper: tibia_l (0.005 -0.065 -0.05)
  Marker L.Shank.Front: tibia_l (0.05 -0.08 0)
  Marker L.Shank.Rear: tibia_l (-0.02 -0.13 -0.05)
  Marker L.Ankle.Lat: tibia_l (-0.005 -0.41 -0.053)
  Marker L.Ankle.Med: tibia_l (0.006 -0.3888 0.038)
  Marker L.Heel: calcn_l (-0.02 0.02 0)
  Marker L.Midfoot.Sup: calcn_l (0.13 0.03 0.03)
  Marker L.Midfoot.Lat: calcn_l (0.1 0.02 -0.04)
  Marker L.Toe.Lat: calcn_l (0.19 0 -0.065)
  Marker L.Toe.Med: calcn_l (0.19 0.005 0.04)
  Marker L.Toe.Tip: calcn_l (0.26 0.005 0)
