# OpenSim document version 20302
CMC_TaskSet cmc_task_set:
  defaults: CMC_Joint default: on=false weight=(1 1 1) wrt_body=-1 express_body=-1 active=(false false false)
      kp=(1 1 1) kv=(1 1 1) ka=(1 1 1) r0=(0 0 0) r1=(0 0 0) r2=(0 0 0) limit=0
  CMC_Joint [values shared by the 19 below unless stated]: weight=(1 1 1) wrt_body=-1 express_body=-1
      active=(true false false) kp=(100 1 1) kv=(20 1 1) ka=(1 1 1) r0=(0 0 0) r1=(0 0 0) r2=(0 0 0) limit=0
  CMC_Joint pelvis_tz: coordinate=pelvis_tz
  CMC_Joint pelvis_tx: coordinate=pelvis_tx
  CMC_Joint pelvis_ty: coordinate=pelvis_ty
  CMC_Joint pelvis_tilt: coordinate=pelvis_tilt
  CMC_Joint pelvis_list: coordinate=pelvis_list
  CMC_Joint pelvis_rotation: coordinate=pelvis_rotation
  CMC_Joint hip_flexion_r: coordinate=hip_flexion_r
  CMC_Joint hip_adduction_r: coordinate=hip_adduction_r
  CMC_Joint hip_rotation_r: coordinate=hip_rotation_r
  CMC_Joint knee_angle_r: coordinate=knee_angle_r
  CMC_Joint ankle_angle_r: coordinate=ankle_angle_r
  # <!-\-Weight with which a task is tracked relative to other tasks. To track
  # a task more tightly, make the weight larger.-\->
  # <!-\-Name of body frame with respect to which a tracking objective is
  # specified. The special name 'center_of_mass' refers to the system
  # center of mass. This property is not used for tracking joint angles.-\->
  # <!-\-Name of body frame in which the tracking objectives are expressed.
  # This property is not used for tracking joint angles.-\->
  # <!-\-Array of 3 flags (each true or false) specifying whether a component
  # of a task is active.  For example, tracking the trajectory of a point
  # in space could have three components (x,y,z).  This allows each of
  # those to be made active (true) or inactive (false).  A task for
  # tracking a joint coordinate only has one component.-\->
  # <!-\-Position error feedback gain (stiffness). To achieve critical damping
  # of errors, choose kv = 2*sqrt(kp).-\->
  # <!-\-Velocity error feedback gain (damping). To achieve critical damping of
  # errors, choose kv = 2*sqrt(kp).-\->
  # <!-\-Feedforward acceleration gain.  This is normally set to 1.0, so no
  # gain.-\->
  # <!-\-Direction vector[3] for component 0 of a task. Joint tasks do not use
  # this propery.-\->
  # <!-\-Direction vector[3] for component 1 of a task. Joint tasks do not use
  # this property.-\->
  # <!-\-Direction vector[3] for component 2 of a task. Joint tasks do not use
  # this property.-\->
  # <!-\-Error limit on the tracking accuracy for this coordinate. If the
  # tracking errors approach this limit, the weighting for this coordinate
  # is increased.-\->
  # <!-\-Weight with which a task is tracked relative to other tasks. To track
  # a task more tightly, make the weight larger.-\->
  # <!-\-Name of body frame with respect to which a tracking objective is
  # specified. The special name 'center_of_mass' refers to the system
  # center of mass. This property is not used for tracking joint angles.-\->
  # <!-\-Name of body frame in which the tracking objectives are expressed.
  # This property is not used for tracking joint angles.-\->
  # <!-\-Array of 3 flags (each true or false) specifying whether a component
  # of a task is active.  For example, tracking the trajectory of a point
  # in space could have three components (x,y,z).  This allows each of
  # those to be made active (true) or inactive (false).  A task for
  # tracking a joint coordinate only has one component.-\->
  # <!-\-Position error feedback gain (stiffness). To achieve critical damping
  # of errors, choose kv = 2*sqrt(kp).-\->
  # <!-\-Velocity error feedback gain (damping). To achieve critical damping of
  # errors, choose kv = 2*sqrt(kp).-\->
  # <!-\-Feedforward acceleration gain.  This is normally set to 1.0, so no
  # gain.-\->
  # <!-\-Direction vector[3] for component 0 of a task. Joint tasks do not use
  # this propery.-\->
  # <!-\-Direction vector[3] for component 1 of a task. Joint tasks do not use
  # this property.-\->
  # <!-\-Direction vector[3] for component 2 of a task. Joint tasks do not use
  # this property.-\->
  # <!-\-Error limit on the tracking accuracy for this coordinate. If the
  # tracking errors approach this limit, the weighting for this coordinate
  # is increased.-\->
  CMC_Joint hip_flexion_l: coordinate=hip_flexion_l
  CMC_Joint hip_adduction_l: coordinate=hip_adduction_l
  CMC_Joint hip_rotation_l: coordinate=hip_rotation_l
  CMC_Joint knee_angle_l: coordinate=knee_angle_l
  CMC_Joint ankle_angle_l: coordinate=ankle_angle_l
  # <!-\-Weight with which a task is tracked relative to other tasks. To track
  # a task more tightly, make the weight larger.-\->
  # <!-\-Name of body frame with respect to which a tracking objective is
  # specified. The special name 'center_of_mass' refers to the system
  # center of mass. This property is not used for tracking joint angles.-\->
  # <!-\-Name of body frame in which the tracking objectives are expressed.
  # This property is not used for tracking joint angles.-\->
  # <!-\-Array of 3 flags (each true or false) specifying whether a component
  # of a task is active.  For example, tracking the trajectory of a point
  # in space could have three components (x,y,z).  This allows each of
  # those to be made active (true) or inactive (false).  A task for
  # tracking a joint coordinate only has one component.-\->
  # <!-\-Position error feedback gain (stiffness). To achieve critical damping
  # of errors, choose kv = 2*sqrt(kp).-\->
  # <!-\-Velocity error feedback gain (damping). To achieve critical damping of
  # errors, choose kv = 2*sqrt(kp).-\->
  # <!-\-Feedforward acceleration gain.  This is normally set to 1.0, so no
  # gain.-\->
  # <!-\-Direction vector[3] for component 0 of a task. Joint tasks do not use
  # this propery.-\->
  # <!-\-Direction vector[3] for component 1 of a task. Joint tasks do not use
  # this property.-\->
  # <!-\-Direction vector[3] for component 2 of a task. Joint tasks do not use
  # this property.-\->
  # <!-\-Error limit on the tracking accuracy for this coordinate. If the
  # tracking errors approach this limit, the weighting for this coordinate
  # is increased.-\->
  # <!-\-Weight with which a task is tracked relative to other tasks. To track
  # a task more tightly, make the weight larger.-\->
  # <!-\-Name of body frame with respect to which a tracking objective is
  # specified. The special name 'center_of_mass' refers to the system
  # center of mass. This property is not used for tracking joint angles.-\->
  # <!-\-Name of body frame in which the tracking objectives are expressed.
  # This property is not used for tracking joint angles.-\->
  # <!-\-Array of 3 flags (each true or false) specifying whether a component
  # of a task is active.  For example, tracking the trajectory of a point
  # in space could have three components (x,y,z).  This allows each of
  # those to be made active (true) or inactive (false).  A task for
  # tracking a joint coordinate only has one component.-\->
  # <!-\-Position error feedback gain (stiffness). To achieve critical damping
  # of errors, choose kv = 2*sqrt(kp).-\->
  # <!-\-Velocity error feedback gain (damping). To achieve critical damping of
  # errors, choose kv = 2*sqrt(kp).-\->
  # <!-\-Feedforward acceleration gain.  This is normally set to 1.0, so no
  # gain.-\->
  # <!-\-Direction vector[3] for component 0 of a task. Joint tasks do not use
  # this propery.-\->
  # <!-\-Direction vector[3] for component 1 of a task. Joint tasks do not use
  # this property.-\->
  # <!-\-Direction vector[3] for component 2 of a task. Joint tasks do not use
  # this property.-\->
  # <!-\-Error limit on the tracking accuracy for this coordinate. If the
  # tracking errors approach this limit, the weighting for this coordinate
  # is increased.-\->
  CMC_Joint lumbar_extension: coordinate=lumbar_extension
  CMC_Joint lumbar_bending: coordinate=lumbar_bending
  CMC_Joint lumbar_rotation: coordinate=lumbar_rotation
