# OpenSim document version 20302
ForceSet rra_actuators:
  PointActuator FX: body=pelvis point=(-0.0724376 0 0) point_is_global=false direction=(1 0 0) force_is_global=true
      optimal_force=4
  PointActuator FY: body=pelvis point=(-0.0724376 0 0) point_is_global=false direction=(0 1 0) force_is_global=true
      optimal_force=8
  PointActuator FZ: body=pelvis point=(-0.0724376 0 0) point_is_global=false direction=(0 0 1) force_is_global=true
      optimal_force=4
  TorqueActuator MX: bodyA=pelvis bodyB=ground torque_is_global=true axis=(1 0 0) optimal_force=2
  TorqueActuator MY: bodyA=pelvis bodyB=ground torque_is_global=true axis=(0 1 0) optimal_force=2
  TorqueActuator MZ: bodyA=pelvis bodyB=ground torque_is_global=true axis=(0 0 1) optimal_force=2
  CoordinateActuator hip_flexion_r: coordinate=hip_flexion_r optimal_force=300
  CoordinateActuator hip_adduction_r: coordinate=hip_adduction_r optimal_force=200
  CoordinateActuator hip_rotation_r: coordinate=hip_rotation_r optimal_force=100
  CoordinateActuator knee_angle_r: coordinate=knee_angle_r optimal_force=300
  CoordinateActuator ankle_angle_r: coordinate=ankle_angle_r optimal_force=300
  # <!-\-Minimum allowed value for control signal. Used primarily when solving
  # for control values-\->
  # <!-\-Maximum allowed value for control signal. Used primarily when solving
  # for control values-\->
  # <!-\-Minimum allowed value for control signal. Used primarily when solving
  # for control values-\->
  # <!-\-Maximum allowed value for control signal. Used primarily when solving
  # for control values-\->
  CoordinateActuator hip_flexion_l: coordinate=hip_flexion_l optimal_force=300
  CoordinateActuator hip_adduction_l: coordinate=hip_adduction_l optimal_force=200
  CoordinateActuator hip_rotation_l: coordinate=hip_rotation_l optimal_force=100
  CoordinateActuator knee_angle_l: coordinate=knee_angle_l optimal_force=300
  CoordinateActuator ankle_angle_l: coordinate=ankle_angle_l optimal_force=300
  # <!-\-Minimum allowed value for control signal. Used primarily when solving
  # for control values-\->
  # <!-\-Maximum allowed value for control signal. Used primarily when solving
  # for control values-\->
  # <!-\-Minimum allowed value for control signal. Used primarily when solving
  # for control values-\->
  # <!-\-Maximum allowed value for control signal. Used primarily when solving
  # for control values-\->
  CoordinateActuator lumbar_extension: coordinate=lumbar_extension optimal_force=200
  CoordinateActuator lumbar_bending: coordinate=lumbar_bending optimal_force=200
  CoordinateActuator lumbar_rotation: coordinate=lumbar_rotation optimal_force=200
