# OpenSim document version 20302
ScaleTool model_scaled:
  mass: 72.6 [kg]
  height: 1803.4
  age: 99
  notes: This is an example setup file for scale.exe.
  GenericModelMaker:
    model_file: ../model/model_generic.osim
    marker_set_file: markers.xml
  ModelScaler:
    apply: true
    scaling_order: measurements manualScale
    marker_file: ../experimental_data/static.trc
    time_range: 1 2
    preserve_mass_distribution: true
    output_model_file: model_scaled.osim
    output_scale_file: model_scale_set_applied.xml
    MeasurementSet model_scaled:
      Measurement torso: apply=true
        MarkerPair: markers=(V.Sacral Top.Head)
        BodyScale torso: axes=(X Y Z)
      Measurement pelvis: apply=true
        MarkerPair: markers=(R.ASIS L.ASIS)
        BodyScale pelvis: axes=(X Y Z)
      Measurement thigh: apply=true
        MarkerPair: markers=(R.ASIS R.Knee.Lat)
        MarkerPair: markers=(L.ASIS L.Knee.Lat)
        BodyScale femur_r: axes=(X Y Z)
        BodyScale femur_l: axes=(X Y Z)
        BodyScale patella_r: axes=(X Y Z)
        BodyScale patella_l: axes=(X Y Z)
      Measurement shank: apply=true
        MarkerPair: markers=(R.Knee.Lat R.Ankle.Lat)
        MarkerPair: markers=(L.Knee.Lat L.Ankle.Lat)
        BodyScale tibia_r: axes=(X Y Z)
        BodyScale tibia_l: axes=(X Y Z)
        BodyScale talus_r: axes=(X Y Z)
        BodyScale talus_l: axes=(X Y Z)
      Measurement foot: apply=true
        MarkerPair: markers=(R.Heel R.Toe.Tip)
        MarkerPair: markers=(L.Heel L.Toe.Tip)
        BodyScale calcn_r: axes=(X Y Z)
        BodyScale calcn_l: axes=(X Y Z)
        BodyScale toes_r: axes=(X Y Z)
        BodyScale toes_l: axes=(X Y Z)
    ScaleSet model_scaled:
      Scale: scales=(1.14724 1.14724 1.14724) segment=femur_r apply=true
      Scale: scales=(1.14724 1.14724 1.14724) segment=femur_l apply=true
      Scale: scales=(0.988523 0.988523 0.988523) segment=tibia_r apply=true
      Scale: scales=(0.988523 0.988523 0.988523) segment=tibia_l apply=true
  MarkerPlacer:
    apply: true
    marker_file: ../experimental_data/static.trc
    time_range: 1 2
    output_motion_file: model_static.mot
    output_model_file: model_scaled.osim
    max_marker_movement: -1
    IKTaskSet model_scaled:
      IKMarkerTask Sternum: apply=true weight=1
      IKMarkerTask R.Acromium: apply=true weight=1
      IKMarkerTask L.Acromium: apply=true weight=1
      IKMarkerTask Top.Head: apply=true weight=1
      IKMarkerTask R.ASIS: apply=true weight=1000
      IKMarkerTask L.ASIS: apply=true weight=1000
      IKMarkerTask V.Sacral: apply=true weight=1000
      IKMarkerTask R.Thigh.Upper: apply=true weight=1
      IKMarkerTask R.Thigh.Front: apply=true weight=1
      IKMarkerTask R.Thigh.Rear: apply=true weight=1
      IKMarkerTask R.Knee.Lat: apply=true weight=1000
      IKMarkerTask R.Knee.Med: apply=true weight=1000
      IKMarkerTask R.Shank.Upper: apply=true weight=1
      IKMarkerTask R.Shank.Front: apply=true weight=1
      IKMarkerTask R.Shank.Rear: apply=true weight=1
      IKMarkerTask R.Ankle.Lat: apply=true weight=1000
      IKMarkerTask R.Ankle.Med: apply=true weight=1000
      IKMarkerTask R.Heel: apply=true weight=1000
      IKMarkerTask R.Midfoot.Sup: apply=true weight=1
      IKMarkerTask R.Midfoot.Lat: apply=true weight=1
      IKMarkerTask R.Toe.Lat: apply=true weight=1
      IKMarkerTask R.Toe.Med: apply=true weight=1
      IKMarkerTask R.Toe.Tip: apply=true weight=1000
      IKMarkerTask L.Thigh.Upper: apply=true weight=1
      IKMarkerTask L.Thigh.Front: apply=true weight=1
      IKMarkerTask L.Thigh.Rear: apply=true weight=1
      IKMarkerTask L.Knee.Lat: apply=true weight=1000
      IKMarkerTask L.Knee.Med: apply=true weight=1000
      IKMarkerTask L.Shank.Upper: apply=true weight=1
      IKMarkerTask L.Shank.Front: apply=true weight=1
      IKMarkerTask L.Shank.Rear: apply=true weight=1
      IKMarkerTask L.Ankle.Lat: apply=true weight=1000
      IKMarkerTask L.Ankle.Med: apply=true weight=1000
      IKMarkerTask L.Heel: apply=true weight=1000
      IKMarkerTask L.Midfoot.Sup: apply=true weight=1
      IKMarkerTask L.Midfoot.Lat: apply=true weight=1
      IKMarkerTask L.Toe.Lat: apply=true weight=1
      IKMarkerTask L.Toe.Med: apply=true weight=1
      IKMarkerTask L.Toe.Tip: apply=true weight=1000
      # <!-\-Weight given to a marker or coordinate for solving inverse kinematics
      # problems.-\->
      # <!-\-Indicates the source of the coordinate value for this task.  Possible
      # values are default_value (use default value of coordinate, as
      # specified in the model file, as the fixed target value), manual_value
      # (use the value specified in the value property of this task as the
      # fixed target value), or from_file (use the coordinate values from the
      # coordinate data specified by the coordinates_file property).-\->
      # <!-\-This value will be used as the desired (or prescribed) coordinate
      # value if value_type is set to manual_value.-\->
      # <!-\-Weight given to a marker or coordinate for solving inverse kinematics
      # problems.-\->
      # <!-\-Indicates the source of the coordinate value for this task.  Possible
      # values are default_value (use default value of coordinate, as
      # specified in the model file, as the fixed target value), manual_value
      # (use the value specified in the value property of this task as the
      # fixed target value), or from_file (use the coordinate values from the
      # coordinate data specified by the coordinates_file property).-\->
      # <!-\-This value will be used as the desired (or prescribed) coordinate
      # value if value_type is set to manual_value.-\->
      # <!-\-Weight given to a marker or coordinate for solving inverse kinematics
      # problems.-\->
      # <!-\-Indicates the source of the coordinate value for this task.  Possible
      # values are default_value (use default value of coordinate, as
      # specified in the model file, as the fixed target value), manual_value
      # (use the value specified in the value property of this task as the
      # fixed target value), or from_file (use the coordinate values from the
      # coordinate data specified by the coordinates_file property).-\->
      # <!-\-This value will be used as the desired (or prescribed) coordinate
      # value if value_type is set to manual_value.-\->
      # <!-\-Weight given to a marker or coordinate for solving inverse kinematics
      # problems.-\->
      # <!-\-Indicates the source of the coordinate value for this task.  Possible
      # values are default_value (use default value of coordinate, as
      # specified in the model file, as the fixed target value), manual_value
      # (use the value specified in the value property of this task as the
      # fixed target value), or from_file (use the coordinate values from the
      # coordinate data specified by the coordinates_file property).-\->
      # <!-\-This value will be used as the desired (or prescribed) coordinate
      # value if value_type is set to manual_value.-\->
      IKCoordinateTask lumbar_extension: apply=true weight=1000 value_type=manual_value value=0
